** vim:fileencoding=utf-8:ft=abaqus
** All values in SI units: m,s,kg,N,Pa,J
** (length,time,mass,force,stress,energy).

*MATERIAL, NAME=steel_S235J
** Standard construction steel
*ELASTIC, TYPE=ISO
210e9,0.30,293
*PLASTIC
235e6,0.00200,293
250e6,0.00326,293
300e6,0.01378,293
350e6,0.04662,293
400e6,0.13397,293
435e6,0.26000,293
*DENSITY
7850
*EXPANSION, TYPE=ISO
12e-6,293

*MATERIAL, NAME=steel_S355
** Standard construction steel
*ELASTIC, TYPE=ISO
210e9,0.30,293
*DEFORMATION PLASTICITY
**In [1]: import math
**
**In [2]: Rp = 330e6;  # yield stress
**
**In [3]: Rm = 530e6; # UTS
**
**In [4]: em = 0.20;  # failure strain
**
**In [5]: n = round(1/(math.log(Rm/Rp)/math.log(em/0.002)), 5)
**Out[5]: 9.71997
210e9,0.30,330e6,9.71997,0.002,293
*DENSITY
7850
*EXPANSION, TYPE=ISO
12e-6,293

*MATERIAL, NAME=steel_1.2312
** Tool steel
** Contains a little sulphur for better turning/milling behavior.
*ELASTIC, TYPE=ISO
205e9,0.30,293
** Quenched and double tempered to 280 - 325 HB (29 - 34 HRC).
*PLASTIC
850e6,0.00200,293
875e6,0.00508,293
900e6,0.01256,293
925e6,0.03030,293
960e6,0.10000,293
*DENSITY
7840
*EXPANSION, TYPE=ISO
11.5e-6,293
11.6e-6,393
12.5e-6,493
12.8e-6,693


*MATERIAL, NAME=steel_1.4301
** AISI 304
*ELASTIC, TYPE=ISO
200e9,0.30,293
*PLASTIC, HARDENING=COMBINED
205e6,0.002,293
300e6,0.01787,293
400e6,0.0935,293
475e6,0.25124,293
515e6,0.40,293
*DENSITY
7900
** σ̅ = 205 MPa
*EXPANSION, TYPE=ISO
17.2e-6,293

*MATERIAL, NAME=steel_1.4401
** AISI 316
*ELASTIC, TYPE=ISO
200e9,0.28,293
*DENSITY
7900
** σ̅ = 205 MPa
*EXPANSION, TYPE=ISO
16e-6,293

*MATERIAL, NAME=steel_C55S
** spring steel, werkstoffnr 1.1204
*ELASTIC, TYPE=ISO
190e9,0.29,293
*DENSITY
7820
*EXPANSION, TYPE=ISO
12e-6,293

*MATERIAL, NAME=steel_C75S
** spring steel 1.1248, AISI 1075
*ELASTIC, TYPE=ISO
200e9,0.30,293
*DENSITY
7700
*EXPANSION, TYPE=ISO
10e-6,293

*MATERIAL, NAME=steel_C100S
** spring steel, werkstoffnr 1.1274
*ELASTIC, TYPE=ISO
190e9,0.29,293
*DENSITY
7800
*EXPANSION, TYPE=ISO
12e-6,293

*MATERIAL, NAME=steel_1.2842
** 1.2842; 90MnCrV8; AISI O2
*ELASTIC, TYPE=ISO
190e9,0.29,293
*DENSITY
7800
*EXPANSION, TYPE=ISO
11.2e-6,373

*MATERIAL, NAME=steel_1.2210
** 115CrV3, L2 tool steel, drillrod, silver steel
** soft annealed: 220 HB, 750 MPa, 27 HRC.
** hardened: 62 HRC
*ELASTIC, TYPE=ISO
200e9,0.285,293
*DENSITY
7800
*EXPANSION, TYPE=ISO
10e-6,293
10e-6,393
12.7e-6,493


** S235J
** Plastic calculations
** {{{ 1
** In [1]: import math
**
** In [2]: Rm = (360+510)/2
** Out[2]: 435.0
**
** In [3]: Rp = 235
** Out[3]: 235
**
** In [4]: em = 0.26
** Out[4]: 0.26
**
** In [5]: n = math.log(Rm/Rp)/math.log(em/0.002)
** Out[5]: 0.12650357654621064
**
** In [6]: H = Rp/(0.002**n)
** Out[6]: 515.8188641724212
**
** In [7]: def plastic_strain(s):
**    ...:     return round((s/H)**(1/n), 5)
**    ...:
**
** In [8]: plastic_strain(235)
** Out[8]: 0.002
**
** In [9]: plastic_strain(250)
** Out[9]: 0.00326
**
** In [10]: plastic_strain(300)
** Out[10]: 0.01378
**
** In [11]: plastic_strain(350)
** Out[11]: 0.04662
**
** In [12]: plastic_strain(400)
** Out[12]: 0.13397
**
** In [13]: plastic_strain(435)
** Out[13]: 0.26
** }}}

** 1.2312
** {{{ 1
**In [1]: import math
**
**In [2]: Rm = 960
**Out[2]: 960
**
**In [3]: Rp = 850
**Out[3]: 850
**
**In [4]: em = 0.10
**Out[4]: 0.1
**
**In [5]: n = math.log(Rm/Rp)/math.log(em/0.002)
**Out[5]: 0.031108440520073274
**
**In [6]: H = Rp/(0.002**n)
**Out[6]: 1031.287309465095
**
**In [7]: def plastic_strain(s):
**   ...:     return round((s/H)**(1/n), 5)
**   ...:
**
**In [8]: plastic_strain(850)
**Out[8]: 0.002
**
**In [9]: plastic_strain(875)
**Out[9]: 0.00508
**
**In [10]: plastic_strain(900)
**Out[10]: 0.01256
**
**In [11]: plastic_strain(925)
**Out[11]: 0.0303
**
**In [12]: plastic_strain(960)
**Out[12]: 0.1
** }}}
