# Change file name to the job name you used.
read result.frd

# Data set number depends on how may things you saved!
ds 4 e 7

rot y
frame
hcpy png right
rot r 90
frame
hcpy png front
rot r 90
frame
hcpy png left
rot r 90
frame
hcpy png back
rot y
rot u 90
frame
hcpy png top
rot d 180
frame
hcpy png bottom

quit
