** vim:ft=abaqus
** All values in SI units: m,s,kg,N,Pa,J
** (length,time,mass,force,stress,energy).

***** Linear static calculation with concentrated load on rigid body. *****
*STEP
*STATIC
*CLOAD
1,3,100
*NODE FILE
U,RF
*EL FILE
ZZS,ME
** Reaction force on fixation nodes.
*NODE PRINT, NSET=Nfix
RF
*END STEP

***** Nonlinear static calculation with concentrated load on rigid body. *****
*STEP, NLGEOM
*STATIC
0.1, 1.0
*CLOAD
1,3,100
*NODE FILE, FREQUENCY=1000
U,RF
*EL FILE, FREQUENCY=1000
ZZS,ME
** Reaction force on fixation nodes.
*NODE PRINT, NSET=Nfix, FREQUENCY=1000
RF
*END STEP
