** vim:ft=abaqus
** All values in SI units: m,s,kg,N,Pa,J
** (length,time,mass,force,stress,energy).

***** Linear static calculation with distributed load *****
*STEP
*STATIC
*DLOAD
** Pressuse difference: 0,8×10⁵ Pa
** Look at top.sur which facet is used.
Stop,P1,0.8e5
*NODE FILE
U,RF
*EL FILE
ZZS,ME
** Reaction force on fixation nodes.
*NODE PRINT, NSET=Nfix
RF
*END STEP

***** Nonlinear static calculation with distributed load *****
*STEP, NLGEOM
*STATIC
0.1, 1.0
*DLOAD
** Pressuse difference: 0,8×10⁵ Pa
** Look at top.sur which facet is used.
Stop,P1,0.8e5
*NODE FILE, FREQUENCY=1000
U,RF
*EL FILE, FREQUENCY=1000
ZZS,ME
** Reaction force on fixation nodes.
*NODE PRINT, NSET=Nfix, FREQUENCY=1000
RF
*END STEP
